processors * * * grid twolevel 32 * * *
newton on
#comm_style tiled
comm_modify cutoff 40
units lj
atom_style angle        # atoms with bonds and angles
boundary p p p          # all boundaries are periodic

read_data polymer.txt   # Polymer definition

#Potentials
neighbor 1 multi
neigh_modify every 1 delay 1 check yes
bond_style harmonic
angle_style harmonic
pair_style lj/cut 2.5

variable b_lj_en equal false
include "polymer_def.lammps"

#Output
log polymer.log
dump mydmp all atom 10000 dump_highdensity.lammpstrj

minimize 1e-4 1e-6 100000 100000
balance 1.1 shift xyz 10 1.05

#Equilibrate (all WCA)
velocity all create 1 1337 #Set the temperature to 236.51 K
fix 1 polymers nvt temp 1 1 10 #use a nose-hoover thermostat to keep the temperature at 236.51 K
fix 2 nanoparticles rigid/nvt/small molecule temp 1 1 10
#fix 3 all balance 1000000 1.1 shift xyz 10 1.05
timestep 0.0001
thermo 1000
run 10000000
write_data equil.lammps
